VAX := READPRN("C:\\Users\\svetl\\Desktop\\Электроника\circuit1.DNO.LIB")
VAX = [
    0, 0;
    0.039996, 8e-6;
    0.079992, 1.6e-5;
    0.119988, 2.4e-5;
    0.159984, 3.2e-5;
    0.19998, 4.01e-5;
    0.239976, 4.83e-5;
    0.27997, 5.76e-5;
    0.31996, 7.15e-5;
    0.359929, 0.0001072
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]
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length(VAX[:, 1]) = 51
Imax := max(VAX[:, 1])
Imax = 1.27768
Ud1 := 0.53334
Ud2 := 0.57456
Ud3 := 0.63118
Ud4 := 0.70884
Id1 := 0.026715
Id2 := 0.1055
Id3 := 0.40888
Id4 := 1.1312
Rb := (Ud1 - 2*Ud2 + Ud3)/Id1
Rb = 0.576455
NFt := ((3*Ud2 - 2*Ud1) - Ud3)/ln(2)
NFt = 0.0372504
Is0 := Id1*exp((Ud2 - 2*Ud1)/NFt)
Is0 = 4.88912e-8
Rb := 1
m := 2
Ft := 0.02
Is0 := 0.0000001
Given
Ud1 == Id1*Rb + ln((Is0 + Id1)/Is0)*m*Ft
Ud2 == Id2*Rb + ln((Is0 + Id2)/Is0)*m*Ft
Ud3 == Id3*Rb + ln((Is0 + Id3)/Is0)*m*Ft
Ud4 == Id4*Rb + ln((Is0 + Id4)/Is0)*m*Ft
Diod_P := Minerr(Is0, Rb, m, Ft)
Diod_P = [3.33581e-11; 0.0709718; 1.61633; 0.0160381]
Is0 := 3.336*10^-11
Rb := 0.0071
Ft := 0.016
m := 1.616
Idiod := VAX[:, 1]
Udiod(Idiod) := Idiod*Rb + m*Ft*ln((Idiod + Is0)/Is0)
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