VAX := READPRN("C:\\Users\\svetl\\Desktop\\Электроника\ЛР2\Значения пиков.ANO")
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Vvar := VAX[:, 0]
Fmax := VAX[:, 1]
Lk := 10^-3
Ck := 10^-10
pi := 3.14
Fr := Fmax
Cde := -(Ck*Lk - 1/(4*Fr^2*pi^2))/Lk
Fr == 1/(2*pi*sqrt((Ck + Cd)*Lk))
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M := 0.4
VJ0 := 0.6
CJ0 := 10^-12
Given
Cde[1] == CJ0*(1 - Vvar[1]/VJ0)^(-M)
Cde[5] == CJ0*(1 - Vvar[5]/VJ0)^(-M)
Cde[11] == CJ0*(1 - Vvar[11]/VJ0)^(-M)
res := Find(CJ0, VJ0, M) = [1.28268e-11; 1.28648; 0.413005]
