ЫЫ
Ud1 := 0.397
Ud2 := 0.433
Ud3 := 0.472
Id1 := 5*10^-3
Id2 := 10*10^-3
Id3 := 20*10^-3
Rb := (Ud1 - 2*Ud2 + Ud3)/Id1
Rb = 0.6
NFt := (3*Ud2 - 2*Ud1 - Ud3)/ln(2)
NFt = 0.0476089
Is0 := Id1*exp((Ud3 - 2*Ud2)/NFt)
Is0 = 1.27308e-6
Id := 0, 0.5*10^-3 .. 50*10^-3
Ud(Id) := Id*Rb + NFt*ln((Id + Is0)/Is0)
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