VAX := READPRN("Схема1.scp")
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Ud1 := 0.40787
Ud2 := 0.41067
Ud3 := 0.43126
Ud4 := 0.46504
Id1 := 0.00019967
Id2 := 0.00022486
Id3 := 0.00052136
Id4 := 0.0020671
Rb := 1
m := 2
Ft := 0.02
Is0 := 10^-6
Given
Ud1 == Id1*Rb + ln((Is0 + Id1)/Is0)*m*Ft
Ud2 == Id2*Rb + ln((Is0 + Id2)/Is0)*m*Ft
Ud3 == Id3*Rb + ln((Is0 + Id3)/Is0)*m*Ft
Ud4 == Id4*Rb + ln((Is0 + Id4)/Is0)*m*Ft
Diod_P := Minerr(Is0, Rb, m, Ft)
Diod_P = [1.06961e-11; 0.153953; 1.56344; 0.0155792]
Is0 := 1.07*10^-11
Rb := 0.154
m := 0.016
Ft := 1.563
Idiod := VAX[:, 1]
Udiod(Idiod) := Idiod*Rb + m*Ft*ln((Idiod + Is0)/Is0)
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