VAX := [-1, 479634; -3.25, 485756; -5, 488253; -7.25, 489836; -10, 490895]
Vvar := VAX[:, 0]
Fmax := VAX[:, 1]
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Lk := 10^-3
Ck := 10^-10
pi := 3.14
Fr := Fmax
Fr == 1/(2*pi*sqrt((Ck + Cd)*Lk))
Cde := -(Ck*Lk - 1/(4*Fr^2*pi^2))/Lk
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M := 0.5
VJ0 := 0.6
CJ0 := 10^-12
Given
Cde[0] == CJ0*(1 - Vvar[0]/VJ0)^(-M)
Cde[1] == CJ0*(1 - Vvar[1]/VJ0)^(-M)
Cde[3] == CJ0*(1 - Vvar[3]/VJ0)^(-M)
Find(CJ0, VJ0, M) = [1.3776e-11; 0.920979; 0.406135]
