Upt := 2.247
Ek := 10
Uk := 5
Ub := 0.75
Ik := 0.25
BF := 116
Ib := Ik/BF = 0.00215517
Rk := (Ek - Uk)/Ik = 20
Rb := (Ek - Ub)/Ib = 4292
Mусил := 540.367*10^-3
Id := 10^-3
R1 := 1
R3 := 1
Mвх := 38.997*10^-3
Given
K := Mусил/Mвх = 13.8566
R1/R3 == (Ek - Ub)/Ub
R1 + R3 == Ek/Id
Minerr(R1, R3) = [9250; 750]
