Upt := 2.247
Ek := 10
Uk := 5
Ub := 0.75
Ik := 10^-2
BF := 153.6
Rk := (Ek - Uk)/Ik = 500
Ib := Ik/BF = 6.51042e-5
Mусил := 840.608*10^-3
Id := 10^-3
R1 := 1
R3 := 1
Mвх := 39.884*10^-3
Given
K := Mусил/Mвх = 21.0763
R1/R3 == (Ek - Ub)/Ub
R1 + R3 == Ek/Id
Minerr(R1, R3) = [9250; 750]
